@DSL Default{
automatic_declaration_of_the_temperature_as_first_external_state_variable:
  false
};
@Behaviour Elasticity;
@Author Thomas Helfer;
@Date 23/11/06;
@Description{
 A very first test
 (the most simple one in fact).
}

@StrainMeasure Hencky;

// Material properties
@MaterialProperty stress young;
young.setGlossaryName("YoungModulus");
@MaterialProperty real   nu;
nu.setGlossaryName("PoissonRatio");

// Lame Coefficients
@LocalVariable stress lambda,mu;

@InitLocalVariables{
  lambda = computeLambda(young,nu);
  mu = computeMu(young,nu);
}

@PredictionOperator{
  static_cast<void>(smt); // remove unused variable warning
  computeAlteredElasticStiffness<hypothesis,real>::exe(Dt,lambda,mu);
}

@ProvidesSymmetricTangentOperator;
@Integrator{
  sig = lambda*trace(eto+deto)*StrainStensor::Id()+2*mu*(eto+deto);
  if(computeTangentOperator_){
    Dt = lambda*Stensor4::IxI()+2*mu*Stensor4::Id();
  }
}
